// SBML level 2 version 4

model untitled()

  // Compartments:
  compartment default_1 = 1 litre;

  // Species:
  substanceOnly species Sensor in default_1 = 2.2;  // substance in item
  substanceOnly species s8 in default_1 = 0; s8 is "rtTR-KRAB";  // substance in item
  substanceOnly species s11 in default_1 = 0; s11 is "rtTR-KRAB*";  // substance in item
  substanceOnly species Repressor in default_1 = 8.1;  // substance in item
  substanceOnly species $Lost in default_1 = 0;  // substance in mole
  substanceOnly species Amplifier in default_1 = 2.2;  // substance in item
  substanceOnly species Effector in default_1 = 181.8;  // substance in item
  substanceOnly species Thresholder in default_1 = 425.1;  // substance in item
  substanceOnly species $aa in default_1 = 0;  // substance in mole
  substanceOnly species UAS_Gal4_amplifier in default_1 = 0/default_1; UAS_Gal4_amplifier is "UAS-Gal4 (amplifier)";  // substance in mole
  substanceOnly species UAS_Gal4_effector in default_1 = 0/default_1; UAS_Gal4_effector is "UAS-Gal4 (effector)";  // substance in mole
  substanceOnly species UAS_GV16_amplifier in default_1 = 0/default_1; UAS_GV16_amplifier is "UAS-GV16 (amplifier)";  // substance in mole
  substanceOnly species UAS_GV16_effector in default_1 = 0/default_1; UAS_GV16_effector is "UAS-GV16 (effector)";  // substance in mole
  substanceOnly species TRE_rtTR_UAS_Gal4_amplifier in default_1 = 0/default_1; TRE_rtTR_UAS_Gal4_amplifier is "TRE-rtTR_UAS-Gal4 (amplifier)";  // substance in mole
  substanceOnly species TRE_rtTR_UAS_Gal4_effector in default_1 = 0/default_1; TRE_rtTR_UAS_Gal4_effector is "TRE-rtTR_UAS-Gal4 (effector)";  // substance in mole
  substanceOnly species TRE_rtTR_UAS_GV16_amplifier in default_1 = 0/default_1; TRE_rtTR_UAS_GV16_amplifier is "TRE-rtTR_UAS-GV16 (amplifier)";  // substance in mole
  substanceOnly species TRE_rtTR_UAS_GV16_effector in default_1 = 0/default_1; TRE_rtTR_UAS_GV16_effector is "TRE-rtTR_UAS-GV16 (effector)";  // substance in mole
  substanceOnly species TRE_rtTR_NF_kB_RE_NF_kB_sensor in default_1 = 0/default_1; TRE_rtTR_NF_kB_RE_NF_kB_sensor is "TRE-rtTR_NF-kB RE-NF-kB (sensor)";  // substance in mole
  substanceOnly species TRE_rtTR_sensor in default_1 = 0/default_1; TRE_rtTR_sensor is "TRE-rtTR (sensor)";  // substance in mole
  substanceOnly species TRE_rtTR_amplifier in default_1 = 0/default_1; TRE_rtTR_amplifier is "TRE-rtTR (amplifier)";  // substance in mole
  substanceOnly species TRE_rtTR_effector in default_1 = 0/default_1; TRE_rtTR_effector is "TRE-rtTR (effector)";  // substance in mole
  substanceOnly species NF_kB_RE_NF_kB_sensor in default_1 = 0/default_1; NF_kB_RE_NF_kB_sensor is "NF-kB RE-NF-kB (sensor)";  // substance in mole
  substanceOnly species NF_kB in default_1 = 1000; NF_kB is "NF-kB";  // substance in item
  substanceOnly species Gal4 in default_1 = 0;  // substance in item
  substanceOnly species GV16 in default_1 = 0;  // substance in item
  substanceOnly species EFFECTOR in default_1 = 0;  // substance in item
  substanceOnly species $Dox in default_1 = 0;  // substance in item

  // Parameters:
  ka_GV16 = 1.66e-6 MWUSERUNIT_per_num_per_sec;
  kd_GV16 = 0.01 MWUSERUNIT_per_sec;
  k_l = 0.00125 MWUSERUNIT_per_sec;
  k_deg = 2.79045e-5 MWUSERUNIT_per_sec;
  ka_NFkB = 1.66e-6 MWUSERUNIT_per_num_per_sec;
  kd_NFkB = 0.01 MWUSERUNIT_per_sec;
  k_s = 0.25 MWUSERUNIT_per_sec;
  k_dil = 8.02254e-6 MWUSERUNIT_per_sec;
  k_dox = 1.66e-6 MWUSERUNIT_per_num_per_sec;
  ka_rtTR = 1.66e-6 MWUSERUNIT_per_num_per_sec;
  kd_rtTR = 0.01 MWUSERUNIT_per_sec;
  k_deg_luc = 9.62704e-5 MWUSERUNIT_per_sec;
  k_deg_gal4 = 0.000115525 MWUSERUNIT_per_sec;
  k_deg_gv16 = 0.000154033 MWUSERUNIT_per_sec;

  // Reactions:
  UnnamedReaction_1: Sensor + NF_kB -> NF_kB_RE_NF_kB_sensor; ka_NFkB*Sensor*NF_kB - kd_NFkB*NF_kB_RE_NF_kB_sensor;
  UnnamedReaction_2: $aa + NF_kB_RE_NF_kB_sensor => GV16 + NF_kB_RE_NF_kB_sensor; k_s*NF_kB_RE_NF_kB_sensor;
  UnnamedReaction_3: $aa + Repressor => s8 + Repressor; k_s*Repressor;
  UnnamedReaction_4: Amplifier + GV16 -> UAS_GV16_amplifier; ka_GV16*Amplifier*GV16 - kd_GV16*UAS_GV16_amplifier;
  UnnamedReaction_5: s8 => $aa; k_deg*s8;
  UnnamedReaction_6: Effector + GV16 -> UAS_GV16_effector; ka_GV16*Effector*GV16 - kd_GV16*UAS_GV16_effector;
  UnnamedReaction_7: $aa + UAS_GV16_effector => EFFECTOR + UAS_GV16_effector; k_s*UAS_GV16_effector;
  UnnamedReaction_9: $aa + Thresholder => Gal4 + Thresholder; k_s*Thresholder*0.01;
  UnnamedReaction_10: Gal4 + Amplifier -> UAS_Gal4_amplifier; ka_GV16*Gal4*Amplifier - kd_GV16*UAS_Gal4_amplifier;
  UnnamedReaction_11: Gal4 + Effector -> UAS_Gal4_effector; ka_GV16*Gal4*Effector - kd_GV16*UAS_Gal4_effector;
  UnnamedReaction_12: Gal4 => $aa; k_deg_gal4*Gal4;
  UnnamedReaction_13: $aa + Sensor => GV16 + Sensor; k_l*Sensor;
  UnnamedReaction_14: $aa + UAS_GV16_amplifier => UAS_GV16_amplifier; k_s*UAS_GV16_amplifier;
  UnnamedReaction_16: $aa + Effector => EFFECTOR + Effector; k_l*Effector;
  UnnamedReaction_17: EFFECTOR => $aa; k_deg_luc*EFFECTOR;
  UnnamedReaction_18: $aa + UAS_Gal4_amplifier => GV16 + UAS_Gal4_amplifier; UAS_Gal4_amplifier*k_l*0.01;
  UnnamedReaction_19: $aa + UAS_Gal4_effector => EFFECTOR + UAS_Gal4_effector; k_l*UAS_Gal4_effector*0.01;
  UnnamedReaction_20: Sensor => $Lost; k_dil*Sensor;
  UnnamedReaction_21: Thresholder => $Lost; k_dil*Thresholder;
  UnnamedReaction_22: Repressor => $Lost; k_dil*Repressor;
  UnnamedReaction_23: Amplifier => $Lost; k_dil*Amplifier;
  UnnamedReaction_24: Effector => $Lost; k_dil*Effector;
  UnnamedReaction_25: s8 + $Dox => s11 + $Dox; k_dox*s8*Dox;
  UnnamedReaction_26: s11 + UAS_GV16_effector -> TRE_rtTR_UAS_GV16_effector; ka_rtTR*s11*UAS_GV16_effector - kd_rtTR*TRE_rtTR_UAS_GV16_effector;
  UnnamedReaction_27: s11 + Effector -> TRE_rtTR_effector; ka_rtTR*s11*Effector - kd_rtTR*TRE_rtTR_effector;
  UnnamedReaction_28: s11 + UAS_Gal4_effector -> TRE_rtTR_UAS_Gal4_effector; ka_rtTR*s11*UAS_Gal4_effector - kd_rtTR*TRE_rtTR_UAS_Gal4_effector;
  UnnamedReaction_29: s11 + UAS_GV16_amplifier -> TRE_rtTR_UAS_GV16_amplifier; ka_rtTR*s11*UAS_GV16_amplifier - kd_rtTR*TRE_rtTR_UAS_GV16_amplifier;
  UnnamedReaction_30: s11 + Amplifier -> TRE_rtTR_amplifier; ka_rtTR*s11*Amplifier - kd_rtTR*TRE_rtTR_amplifier;
  UnnamedReaction_31: s11 + UAS_Gal4_amplifier -> TRE_rtTR_UAS_Gal4_amplifier; ka_rtTR*s11*UAS_Gal4_amplifier - kd_rtTR*TRE_rtTR_UAS_Gal4_amplifier;
  UnnamedReaction_32: s11 + Sensor -> TRE_rtTR_sensor; ka_rtTR*s11*Sensor - kd_rtTR*TRE_rtTR_sensor;
  UnnamedReaction_33: s11 + NF_kB_RE_NF_kB_sensor -> TRE_rtTR_NF_kB_RE_NF_kB_sensor; ka_rtTR*s11*NF_kB_RE_NF_kB_sensor - kd_rtTR*TRE_rtTR_NF_kB_RE_NF_kB_sensor;
  UnnamedReaction_34: NF_kB_RE_NF_kB_sensor => $Lost; k_dil*NF_kB_RE_NF_kB_sensor;
  UnnamedReaction_35: TRE_rtTR_sensor => $Lost; k_dil*TRE_rtTR_sensor;
  UnnamedReaction_36: TRE_rtTR_NF_kB_RE_NF_kB_sensor => $Lost; k_dil*TRE_rtTR_NF_kB_RE_NF_kB_sensor;
  UnnamedReaction_37: UAS_Gal4_amplifier => $Lost; k_dil*UAS_Gal4_amplifier;
  UnnamedReaction_38: UAS_GV16_amplifier => $Lost; k_dil*UAS_GV16_amplifier;
  UnnamedReaction_39: s11 => $aa; k_deg*s11;
  UnnamedReaction_40: TRE_rtTR_UAS_Gal4_amplifier => $Lost; k_dil*TRE_rtTR_UAS_Gal4_amplifier;
  UnnamedReaction_41: TRE_rtTR_amplifier => $Lost; k_dil*TRE_rtTR_amplifier;
  UnnamedReaction_42: TRE_rtTR_UAS_GV16_amplifier => $Lost; k_dil*TRE_rtTR_UAS_GV16_amplifier;
  UnnamedReaction_43: UAS_Gal4_effector => $Lost; k_dil*UAS_Gal4_effector;
  UnnamedReaction_44: UAS_GV16_effector => $Lost; k_dil*UAS_GV16_effector;
  UnnamedReaction_45: TRE_rtTR_UAS_Gal4_effector => $Lost; k_dil*TRE_rtTR_UAS_Gal4_effector;
  UnnamedReaction_46: TRE_rtTR_effector => $Lost; k_dil*TRE_rtTR_effector;
  UnnamedReaction_47: TRE_rtTR_UAS_GV16_effector => $Lost; k_dil*TRE_rtTR_UAS_GV16_effector;
  Reaction_48: s8 => $Lost; s8*k_dil*0;
  Reaction_49: s11 => $Lost; s11*k_dil*0;
  Reaction_1: $aa + Amplifier => GV16 + Amplifier; k_l*Amplifier;
  Reaction_2: EFFECTOR => $Lost; k_dil*EFFECTOR;
  Reaction_3: Gal4 => $Lost; k_dil*Gal4;
  Reaction_4: GV16 => $aa; k_deg_gv16*GV16;
  Reaction_5: $aa + UAS_GV16_amplifier => GV16 + UAS_GV16_amplifier; k_s*UAS_GV16_amplifier;

  // Unit definitions:
  unit MWUSERUNIT_per_num_per_sec = 6.022142e23 dimensionless / (mole * second);
  unit MWUSERUNIT_per_sec = dimensionless / second;
end
